*Heading
 Thermal and mechanical analysis
** Job name: ThermalAnalysis Model name: Model-1
** Generated by: Abaqus/CAE Learning Edition 2024
*Preprint, echo=NO, model=NO, history=NO, contact=NO
**
** PARTS
**
*Part, name=Cu
*Node
      1,   12.1352549,           0.,   8.81677914
      2,   4.63525486,           0.,   14.2658482
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*Element, type=C3D8T
  1,   2,   1,  11,  15,  22,  21,  31,  35
  2,   2,  15,  12,   3,  22,  35,  32,  23
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*Nset, nset=Cuvolume, generate
   1,  220,    1
*Elset, elset=Cuvolume, generate
   1,  140,    1
*Nset, nset=_G4, internal, generate
   1,  220,    1
*Elset, elset=_G4, internal, generate
   1,  140,    1
*Elset, elset=_ContactSurfCu_S3, internal
   1,  10,  13,  15,  24,  27
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*Elset, elset=_ContactSurfCu_S6, internal, generate
   2,  135,    7
*Elset, elset=_ContactSurfCu_S5, internal, generate
   7,  133,   14
*Elset, elset=_ContactSurfCu_S4, internal
   8,  11,  12,  13,  22,  25
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*Surface, type=ELEMENT, name=ContactSurfCu
_ContactSurfCu_S3, S3
_ContactSurfCu_S6, S6
_ContactSurfCu_S4, S4
_ContactSurfCu_S5, S5
** Section: Via
*Solid Section, elset=_G4, material=Cu
,
*End Part
**
*Part, name=Si
*Node
      1,           5.,         100.,   8.66025448
      2,          -5.,         100.,   8.66025448
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*Element, type=C3D8T
  1,  24,   2,  32,  36,  79,  57,  87,  91
  2,  49,  34,  51,  54, 104,  89, 106, 109
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*Nset, nset=Sivolume, generate
   1,  605,    1
*Elset, elset=Sivolume, generate
   1,  440,    1
*Nset, nset=SiLateralSurf
   7,   8,   9,  10,  11,  12
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*Elset, elset=SiLateralSurf
  10,  11,  13,  16,  24,  26
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*Nset, nset=_G5, internal, generate
   1,  605,    1
*Elset, elset=_G5, internal, generate
   1,  440,    1
*Elset, elset=_ContactSurfSi_S5, internal, generate
   4,  400,   44
*Elset, elset=_ContactSurfSi_S6, internal, generate
   9,  405,   44
*Elset, elset=_ContactSurfSi_S3, internal
  12,  20,  23,  56,  64,  67
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*Elset, elset=_ContactSurfSi_S4, internal, generate
  18,  414,   44
*Surface, type=ELEMENT, name=ContactSurfSi
_ContactSurfSi_S5, S5
_ContactSurfSi_S6, S6
_ContactSurfSi_S4, S4
_ContactSurfSi_S3, S3
** Section: wafer
*Solid Section, elset=_G5, material=Si
,
*End Part
**
**
** ASSEMBLY
**
*Assembly, name=Assembly
**
*Instance, name=Cu, part=Cu
*End Instance
**
*Instance, name=Si, part=Si
*End Instance
**
** Constraint: CuSiTie
*Tie, name=CuSiTie, adjust=yes
Si.ContactSurfSi, Cu.ContactSurfCu
*End Assembly
*Amplitude, name=ThermalCycle, time=TOTAL TIME
             0.,             25.,           18.33,            300.,           28.33,            300.,           44.33,            -65.
          54.33,            -65.,             70.,             25.,           88.33,            300.,           98.33,            300.
         114.33,            -65.,          124.33,            -65.,            140.,             25.,          158.33,            300.
         168.33,            300.,          184.33,            -65.,          194.33,            -65.,            210.,             25.
         228.33,            300.,          238.33,            300.,          254.33,            -65.,          264.33,            -65.
           280.,             25.,          298.33,            300.,          308.33,            300.,          324.33,            -65.
         334.33,            -65.,            350.,             25.,          368.33,            300.,          378.33,            300.
         394.33,            -65.,          404.33,            -65.,            420.,             25.,          438.33,            300.
         448.33,            300.,          464.33,            -65.,          474.33,            -65.,            490.,             25.
         508.33,            300.,          518.33,            300.,          534.33,            -65.,          544.33,            -65.
           560.,             25.,          578.33,            300.,          588.33,            300.,          604.33,            -65.
         614.33,            -65.,            630.,             25.,          648.33,            300.,          658.33,            300.
         674.33,            -65.,          684.33,            -65.,            700.,             25.
**
** MATERIALS
**
*Material, name=Cu
*Conductivity
 0.401,
*Damage Initiation, criterion=DUCTILE
 0.15, 0.1,  0.
*Damage Evolution, type=DISPLACEMENT
 0.1,
*Density
 8.96e-12,
*Elastic
120000., 0.34
*Expansion
 1.7e-05,
*Plastic
    140.,         0.
 149.666, 0.00100503
 151.785, 0.00201005
 153.234, 0.00301508
 154.369,  0.0040201
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 183.924,        0.2
*Specific Heat
 0.00039,
*Material, name=Si
*Conductivity
 0.149,
*Density
 2.33e-12,
*Elastic
130000., 0.28
*Expansion
 2.8e-06,
*Specific Heat
 0.0007,
**
** BOUNDARY CONDITIONS
**
** Name: FixedSiLateral Type: Displacement/Rotation
*Boundary, fixed
Si.SiLateralSurf, 1, 1
Si.SiLateralSurf, 2, 2
Si.SiLateralSurf, 3, 3
** ----------------------------------------------------------------
**
** STEP: TCTCondition
**
*Step, name=TCTCondition, nlgeom=NO, inc=100000
*Coupled Temperature-displacement, creep=none, deltmx=1.
0.1, 700., 1e-05, 1.
**
** BOUNDARY CONDITIONS
**
** Name: CuTempBC Type: Temperature
*Boundary, amplitude=ThermalCycle
Cu.Cuvolume, 11, 11, 1.
** Name: SiTempBC Type: Temperature
*Boundary, amplitude=ThermalCycle
Si.Sivolume, 11, 11, 1.
**
** OUTPUT REQUESTS
**
*Restart, write, frequency=0
**
** FIELD OUTPUT: F-Output-1
**
*Output, field, variable=PRESELECT
**
** HISTORY OUTPUT: H-Output-1
**
*Output, history, variable=PRESELECT
*End Step
